j := sqrt(-1)
l := 50
q := 45*π/180 = 0.785398  # Угол коэффициента мощности
U := 106.654*10^3/sqrt(3)
I(U) :=
    151.5 if U > 100*10^3/sqrt(3)
    605 if U > 200*10^3/sqrt(3)
    2475 if U > 480*10^3/sqrt(3)
r_0(U) :=
    0.424 if U > 100*10^3/sqrt(3)
    0.121 if U > 200*10^3/sqrt(3)
    0.025 if U > 480*10^3/sqrt(3)
x_0(U) :=
    0.452 if U > 100*10^3/sqrt(3)
    0.435 if U > 200*10^3/sqrt(3)
    0.305 if U > 480*10^3/sqrt(3)
g_0(U) :=
    10^-8 if U > 100*10^3/sqrt(3)
    4.13*10^-8 if U > 200*10^3/sqrt(3)
    4*10^-8 if U > 480*10^3/sqrt(3)
b_0(U) :=
    2.66*10^-6 if U > 100*10^3/sqrt(3)
    2.6*10^-6 if U > 200*10^3/sqrt(3)
    3.62*10^-6 if U > 480*10^3/sqrt(3)
# 1. Распределенные параметры
y := sqrt((r_0(U) + j*x_0(U))*(g_0(U) + j*b_0(U))) = 0.000474576 + 0.00119302i
Z_c := sqrt((r_0(U) + j*x_0(U))/(g_0(U) + j*b_0(U))) = 449.169 - 176.723i
|y| = 0.00128395
arg(y)*180/π = 68.3077
|Z_c| = 482.684
arg(Z_c)*180/π = -21.4769
# 2. Расчет параметров режима
I_2 := I(U)*e^(-j*q) = 107.127 - 107.127i
|I_2| = 151.5
U_2 := U = 61576.7
U_1 := cosh(y*l)*U_2 + Z_c*I_2*sinh(y*l) = 66174.2 + 239.231i
|U_1| = 66174.7
arg(U_1) = 0.00361515
I_1 := cosh(y*l)*I_2 + U_2/Z_c*sinh(y*l) = 107.145 - 98.6291i
|I_1| = 145.629
arg(I_1) = -0.744038
arg(U_1) - arg(I_1) = 0.747653
U_1*sqrt(2) = 93584.5 + 338.324i
ΔU := U_1 - U_2 = 4597.52 + 239.231i
|ΔU| = 4603.74
U_2*sqrt(2) = 87082.6
# 3. Расчет сопротивления (1 способ)
I_1*sqrt(2) = 151.526 - 139.483i
I_2*sqrt(2) = 151.5 - 151.5i
R_t1 := |Re(ΔU/I_1)| = 22.1149
R_t2 := |Re(ΔU/I_2)| = 20.3418
R_t := (R_t1 + R_t2)/2 = 21.2283
3*conj(I_2)*U_2 = 19789527 + 19789527i
δR_p := (r_0(U)*l - |R_t|)/(r_0(U)*l) = -0.00133531
Δt := δR_p/0.00403 = -0.331342
3*conj(143.76 - j*152.139)*(90084.3 - j*279.817)/2 = 19489635 + 20497663i
# 4. Расчет сопротивления через параметры четырехполюсника
A := (U_2^2*I_2 + U_1*U_2*I_1)/(U_2^2*I_1 + U_1*U_2*I_2) = 0.998502 + 0.00141474i
B := (U_1^2*U_2 - U_2^3)/(U_2^2*I_1 + U_1*U_2*I_2) = 21.1788 + 22.5987i
C := (U_2*I_1^2 - U_2*I_2^2)/(U_2^2*I_1 + U_1*U_2*I_2) = 4.37018e-7 + 0.000132934i
y_p := 1/l*(atanh(Re(sqrt(B*C))/Re(A)) + j*atan(Im(A)/Re(sqrt(B*C)))) = 0.000474576 + 0.00119302i
Z_c.p := sqrt(B/C) = 449.169 - 176.723i
z_0 := Z_c.p*y_p = 0.424 + 0.452i
y_0 := y_p/Z_c.p = 1e-8 + 2.66e-6i
A := (U_2*I_2 + U_1*I_1)/(U_2*I_1 + U_1*I_2) = 0.998502 + 0.00141474i
B := (U_1^2 - U_2^2)/(U_2*I_1 + U_1*I_2) = 21.1788 + 22.5987i
C := (I_1^2 - I_2^2)/(U_2*I_1 + U_1*I_2) = 4.37018e-7 + 0.000132934i
# 5. Погрешность Алгоритма 2
A(U_1, U_2, I_1, I_2, δ_1, δ_2, ϕ_1, ϕ_2) := (U_2*I_2*e^(j*(δ_2 + δ_2 - ϕ_2)) + U_1*I_1*e^(j*(δ_1 + δ_1 - ϕ_1)))/(U_2*I_1*e^(j*(δ_2 + δ_1 - ϕ_1)) + U_1*I_2*e^(j*(δ_1 + δ_2 - ϕ_2)))
K := 0.28
B(U_1, U_2, I_1, I_2, δ_1, δ_2, ϕ_1, ϕ_2) := (U_1^2*e^(j*2*δ_1) - U_2^2*e^(j*2*δ_2))/(U_2*I_1*e^(j*(δ_2 + δ_1 - ϕ_1)) + U_1*I_2*e^(j*(δ_1 + δ_2 - ϕ_2)))
δI := 1.4*0.01*K
δU := 1.4*0.01*K  # погрещность измерения напряжения
C(U_1, U_2, I_1, I_2, δ_1, δ_2, ϕ_1, ϕ_2) := (I_1^2*e^(j*2*(δ_1 - ϕ_1)) - I_2^2*e^(j*2*(δ_2 - ϕ_2)))/(U_2*I_1*e^(j*(δ_2 + δ_1 - ϕ_1)) + U_1*I_2*e^(j*(δ_1 + δ_2 - ϕ_2)))
Δδ := 1.4*0.01*K  # угловая погрешность измерения напряжения
Δϕ := 1.7*0.01*K
R(U_1, U_2, I_1, I_2, δ_1, δ_2, ϕ_1, ϕ_2) := (sqrt(B(U_1, U_2, I_1, I_2, δ_1, δ_2, ϕ_1, ϕ_2)/C(U_1, U_2, I_1, I_2, δ_1, δ_2, ϕ_1, ϕ_2))*(atanh(Re(sqrt(B(U_1, U_2, I_1, I_2, δ_1, δ_2, ϕ_1, ϕ_2)*C(U_1, U_2, I_1, I_2, δ_1, δ_2, ϕ_1, ϕ_2)))/Re(A(U_1, U_2, I_1, I_2, δ_1, δ_2, ϕ_1, ϕ_2))) + j*atan(Im(A(U_1, U_2, I_1, I_2, δ_1, δ_2, ϕ_1, ϕ_2))/Re(sqrt(B(U_1, U_2, I_1, I_2, δ_1, δ_2, ϕ_1, ϕ_2)*C(U_1, U_2, I_1, I_2, δ_1, δ_2, ϕ_1, ϕ_2))))))
ΔR(U_1, U_2, I_1, I_2, δ_1, δ_2, ϕ_1, ϕ_2) := sqrt((δU*d/dU_1(R(U_1, U_2, I_1, I_2, δ_1, δ_2, ϕ_1, ϕ_2)))^2 + (δU*d/dU_2(R(U_1, U_2, I_1, I_2, δ_1, δ_2, ϕ_1, ϕ_2)))^2 + (δI*d/dI_1(R(U_1, U_2, I_1, I_2, δ_1, δ_2, ϕ_1, ϕ_2)))^2 + (δI*d/dI_2(R(U_1, U_2, I_1, I_2, δ_1, δ_2, ϕ_1, ϕ_2)))^2 + (Δδ*d/dδ_1(R(U_1, U_2, I_1, I_2, δ_1, δ_2, ϕ_1, ϕ_2)))^2 + (Δδ*d/dδ_2(R(U_1, U_2, I_1, I_2, δ_1, δ_2, ϕ_1, ϕ_2)))^2 + (Δϕ*d/dϕ_1(R(U_1, U_2, I_1, I_2, δ_1, δ_2, ϕ_1, ϕ_2)))^2 + (Δϕ*d/dϕ_2(R(U_1, U_2, I_1, I_2, δ_1, δ_2, ϕ_1, ϕ_2)))^2)
δR_p := Re(ΔR(|U_1|, |U_2|, |I_1|, |I_2|, arg(U_1), arg(U_2), arg(U_1) - arg(I_1), arg(U_2) - arg(I_2)))*100/(r_0(U)*l) = 7.81607
Δt := δR_p/(0.00403*100) = 19.3947
r_0(U) :=
    0.249 if U > 100*10^3
    0.121 if U > 200*10^3
    0.025 if U > 480*10^3
